Задание1
1.
I_н := 60
I_ср := 35.6
R_0 := 1.17
σ := 14.7
ΔP_xx := 2270
ΔP_кз := 7600
L := 2
ΔP_Л := 3*I_ср^2*R_0*L + 3*σ^2*R_0*L
ΔP_Л = 10413.8
2.
f(x) := x + 0.2 - cos(x)
# [plot: x vs f(x)]
x := -1
f(x) = -1.3403
z1 := root(f(x), x)
z1 = 0.616124
3.
g(x_1) := 0.05*x_1^2 + 1.4*x_1 - 19720
v := [-19720; 1.4; 0.05]
polyroots(v) = [-642.169; 614.169]
4.
integral(x_i^2 + x_i, x_i = 0 .. 1) = 0.833333
5.
A := [1.7, 3.2, 4.3, 8.1; 3.1, 3.4, 5.7, 6.5; 6.2, 3.7, 5.7, 4.1; 5.3, 5.4, 3.9, 1.8]
C := [1.0; 3.2; 2.1; 0.9]
6.
A^-1 = [
    0.279255, -0.626722, 0.488133, -0.105343;
    0.0244937, 0.0977441, -0.35936, 0.355356;
    -0.581307, 0.892037, -0.243746, -0.0501634;
    0.363766, -0.380631, 0.168918, -0.0916486
]
7.
transpose(A) = [1.7, 3.1, 6.2, 5.3; 3.2, 3.4, 3.7, 5.4; 4.3, 5.7, 5.7, 3.9; 8.1, 6.5, 4.1, 1.8]
transpose(C) = [1, 3.2, 2.1, 0.9]
8.
|A| = -134.361
9.
Given
